// COMSOL Multiphysics 6.4.0.429 model "twolayer_parallel_benchmark.mph"
// Outline of the model tree

Geometry
  geom1 "Geometry 1" (2D, length unit mm)
    r1: Rectangle | size = {0.5, 1}
    r2: Rectangle | size = {0.5, 1}; pos = {0.5, 0}
    fin: Finalize "Form Union"

Materials
  mat1: Common "Material 1" on domains 1
    def: def "Basic"
      thermalconductivity = 0.167
      density = 1190
      heatcapacity = 2100
  mat2: Common "Material 2" on domains 2
    def: def "Basic"
      thermalconductivity = 0.450
      density = 1950
      heatcapacity = 1500

Physics
  ht: HeatTransfer "Heat Transfer in Solids" on all domains
    dependent variable T
    solid1: SolidHeatTransferModel "Solid 1" (default)
    init1: init "Initial Values 1" (default)
    ins1: ThermalInsulation (default)
    temp1: TemperatureBoundary "Temperature 1" on boundaries 3, 6 | T0 = 310[K]
    temp2: TemperatureBoundary "Temperature 2" on boundaries 2, 5 | T0 = 290[K]

Mesh
  mesh1 "Mesh 1" (physics-controlled)

Studies
  std1 "Study 1"
    stat: Stationary

Solver configurations
  sol1 "Solution 1" (study std1)
    v1: Variables "Dependent Variables 1"
    s1: Stationary "Stationary Solver 1"
      fc1: FullyCoupled
      d1: Direct "Direct, heat transfer variables (ht)"

Datasets
  dset1: Solution | solution = sol1

Derived values
  int1: IntLine "Line Integration 1" on boundaries 2, 5 | data = dset1; table = tbl1; expr = ht.ndflux

Plots
  pg1: PlotGroup2D "Temperature (ht)" | data = dset1
    surf1: Surface | expr = T