// COMSOL Multiphysics 6.4.0.429 model "twolayer_parallel_benchmark.mph"
// Outline of the model tree

Parameters
  km = 0.167 [W/(m*K)]  // Isotropic HTPB matrix conductivity
  kc = 3000 [W/(m*K)]  // Intrinsic CNT thermal conductivity
  Vf = 0.05  // CNT volume fraction (5%)
  d_cnt = 10 [nm]  // CNT diameter
  L_cnt = 10 [um]  // CNT length
  Rk = 1e-8 [(m^2*K)/W]  // CNT-HTPB Kapitza thermal resistance
  kc_L = kc / (1 + (2*Rk*kc)/L_cnt)  // Effective CNT longitudinal conductivity
  kc_T = kc / (1 + (2*Rk*kc)/d_cnt)  // Effective CNT transverse conductivity
  k_para = km + Vf*(kc_L - km)  // Composite conductivity (perfect Y alignment)
  k_perp = km * (kc_T*(1+Vf) + km*(1-Vf)) / (kc_T*(1-Vf) + km*(1+Vf))  // Composite conductivity (perfect X alignment)
  S_factor = 1.0  // Hermans Orientation Factor (-0.5 to 1.0)
  k_yy = k_perp + (k_para - k_perp)*((2*S_factor + 1)/3)  // Principal conductivity parallel to Y-axis
  k_xx = k_perp + (k_para - k_perp)*((1 - S_factor)/3)  // Principal conductivity parallel to X-axis

Geometry
  geom1 "Geometry 1" (2D, length unit mm)
    r1: Rectangle | size = {0.5, 1}
    r2: Rectangle | size = {0.5, 1}; pos = {0.5, 0}
    fin: Finalize "Form Union"

Materials
  mat1: Common "Material 1" on domains 1
    def: def "Basic"
      thermalconductivity = diag{k_xx, k_yy, k_xx}
      density = 1190
      heatcapacity = 2100
  mat2: Common "Material 2" on domains 2
    def: def "Basic"
      thermalconductivity = 0.450
      density = 1950
      heatcapacity = 1500

Physics
  ht: HeatTransfer "Heat Transfer in Solids" on all domains
    dependent variable T
    solid1: SolidHeatTransferModel "Solid 1" (default)
    init1: init "Initial Values 1" (default)
    ins1: ThermalInsulation (default)
    temp1: TemperatureBoundary "Temperature 1" on boundaries 3, 6 | T0 = 310[K]
    temp2: TemperatureBoundary "Temperature 2" on boundaries 2, 5 | T0 = 290[K]

Mesh
  mesh1 "Mesh 1" (physics-controlled)

Studies
  std1 "Study 1"
    stat: Stationary

Solver configurations
  sol1 "Solution 1" (study std1)
    v1: Variables "Dependent Variables 1"
    s1: Stationary "Stationary Solver 1"
      fc1: FullyCoupled
      d1: Direct "Direct, heat transfer variables (ht)"

Datasets
  dset1: Solution | solution = sol1

Derived values
  int1: IntLine "Line Integration 1" on boundaries 2, 5 | data = dset1; table = tbl1; expr = ht.ndflux

Plots
  pg1: PlotGroup2D "Temperature (ht)" | data = dset1
    surf1: Surface | expr = T